<?xml version="1.0"?>

<Node name="root" dt="0.01" gravity="0 -9.81 0">
    <RequiredPlugin name="SofaOpenglVisual"/>
    <RequiredPlugin pluginName="SofaPython"/>
    <RequiredPlugin name="SofaValidation" />

    <!-- Specify the visual style at the start of the scene -->
    <VisualStyle displayFlags="showVisual" />

    <!-- Default variables needed for collisions -->
    <DefaultPipeline depth="6" verbose="0" />
    <BruteForceDetection name="Detection" />
    <MinProximityIntersection name="Proximity" alarmDistance="0.5" contactDistance="0.05" />
    <DefaultContactManager name="Response" response="default" />

    <!-- Import the catheter -->
    <include href="catheter.scn" />

    <Node name = "Vessel">
        <EulerImplicitSolver name="ImplicitEulerSolver" rayleighMass="0.1" rayleighStiffness="0.1" />
        <CGLinearSolver name="CGLinearSolver" iterations="25" tolerance="1e-9" threshold="1e-9" />
        <SparseGridTopology fileTopology="mesh/vessel.obj" n="20 6 6" />
        <MechanicalObject name="VesselState" />
        <UniformMass totalMass="0.05" />
        <HexahedronFEMForceField template="Vec3d" name="FEM" poissonRatio="0.45" youngModulus="10" />
        <FixedConstraint name="FixedConstraint" indices=" 0   5  26  31   32  37  58  63   64  69  90  95   96 101 122 127  128 133 154 159
                                                        160 165 186 191  192 197 218 223  224 229 250 255  256 261 282 287  288 293 314 319
                                                        320 325 346 351  352 357 378 383  384 389 410 415  416 421 442 447  448 453 474 479
                                                        480 485 506 511  512 517 538 543  544 549 570 575  576 581 602 607  608 613 634 639" />

        <Node name="CollisionModel">
            <MeshSTLLoader name="loader" filename="mesh/vessel.stl" />
            <TriangleSetTopologyContainer  name="Container" src="@loader"/>
            <TriangleSetTopologyModifier   name="Modifier" />
            <TriangleSetTopologyAlgorithms name="TopoAlgo" template="Vec3d" />
            <TriangleSetGeometryAlgorithms name="GeomAlgo" template="Vec3d" />
            <MechanicalObject name="CollisionState" src="@loader" />
            <TriangleCollisionModel template="Vec3d" name="Triangles" contactStiffness="1"                      bothSide="1" />
            <LineCollisionModel     template="Vec3d" name="Lines"     contactStiffness="@[-1].contactStiffness" bothSide="1" />
            <PointCollisionModel    template="Vec3d" name="Points"    contactStiffness="@[-1].contactStiffness" bothSide="1" />
            <BarycentricMapping />

            <Node name="VisualModel">
                <OglModel name="Visual" material="Default Diffuse 1 0 0 1 0.3 Ambient 1 0 0 0.1 0.3" />
                <IdentityMapping  input="@.." output="@Visual" />
            </Node>
        </Node>
    </Node>
</Node>
