<?xml version="1.0"?>

<Node name="root" dt="0.01" gravity="0 -9.81 0">
    <RequiredPlugin name="SofaOpenglVisual"/>
    <RequiredPlugin pluginName="SofaPython"/>
    <RequiredPlugin name="SofaValidation" />

    <!-- Specify the visual style at the start of the scene -->
    <VisualStyle displayFlags="showVisual" />

    <!-- Default variables needed for collisions -->
    <DefaultPipeline depth="6" verbose="0" />
    <BruteForceDetection name="Detection" />
    <MinProximityIntersection name="Proximity" alarmDistance="0.5" contactDistance="0.05" />
    <DefaultContactManager name="Response" response="default" />

    <!-- Import the catheter -->
    <include href="catheter.scn" />

    <Node name = "Vessel">
        <EulerImplicitSolver name="ImplicitEulerSolver" rayleighMass="0.1" rayleighStiffness="0.1" />
        <CGLinearSolver name="CGLinearSolver" iterations="25" tolerance="1e-9" threshold="1e-9" />
        <SparseGridTopology fileTopology="mesh/vessel2.obj" n="20 6 6" />
        <MechanicalObject name="VesselState" />
        <UniformMass totalMass="0.05" />
        <HexahedronFEMForceField template="Vec3d" name="FEM" poissonRatio="0.45" youngModulus="10" />
        <FixedConstraint name="FixedConstraint" indices=" 0   3  20  23   24  27  44  47   48  52  73  77   78  81  98 101
                                                        102 105 122 125  126 128 141 143  146 147 159 165  166 169 186 189
                                                        193 194 209 217  218 222 243 247  248 252 273 277  278 286 301 302
                                                        306 309 326 329  330 336 348 349  352 354 367 369  370 373 390 393
                                                        394 397 414 417  418 422 443 447  448 451 468 471  472 475 492 495" />

        <Node name="CollisionModel">
            <MeshSTLLoader name="loader" filename="mesh/vessel2.stl" />
            <TriangleSetTopologyContainer  name="Container" src="@loader"/>
            <TriangleSetTopologyModifier   name="Modifier" />
            <TriangleSetTopologyAlgorithms name="TopoAlgo" template="Vec3d" />
            <TriangleSetGeometryAlgorithms name="GeomAlgo" template="Vec3d" />
            <MechanicalObject name="CollisionState" src="@loader" />
            <TriangleCollisionModel template="Vec3d" name="Triangles" contactStiffness="1"                      bothSide="1" />
            <LineCollisionModel     template="Vec3d" name="Lines"     contactStiffness="@[-1].contactStiffness" bothSide="1" />
            <PointCollisionModel    template="Vec3d" name="Points"    contactStiffness="@[-1].contactStiffness" bothSide="1" />
            <BarycentricMapping />

            <Node name="VisualModel">
                <OglModel name="Visual" material="Default Diffuse 1 0 0 1 0.3 Ambient 1 0 0 0.1 0.3" />
                <IdentityMapping  input="@.." output="@Visual" />
            </Node>
        </Node>
    </Node>
</Node>
